finish
/ clear            !清除目前ANSYS中所有数据
/filnam,internal force in frame  !定义工作名
/title,frame                     !定义分析标题
/prep7             !进入前处理模块
ET,1,BEAM4         !定义热分析单元
MP,ex,1,2.06e11      !定义钢管的材料的弹性模量
MP,dens,1,7850       !定义钢管的材料的密度
MP,alpx,1,1.2e-5     !定义钢管的材料的线膨胀系数
MP,prxy,1,0.3        !定义钢管的材料的泊松比
TB,BISO,1,1,2,       !定义钢管的本构关系为双线性模型
TBTEMP,0             !定义钢管的本构关系所对应的温度
TBDATA,,345e6,0,,,,  !定义钢管的的屈服强度为345MPa
R,1,850000         !面积
TYPE,1
MAT,1
REAL,1
N,1,-4.74575335802703,7.40582283252268,-5.13324601088104

N,2,-6.64222909717243,6.94828717739703,-5.12171968083857

N,3,-8.21927653979531,5.79981336262314,-5.12632065612855

N,4,-9.23675554409445,4.13529523214156,-5.14156786583289

N,5,-9.53981265131369,2.20807539858557,-5.15099474006029

N,6,-9.08227691831303,0.311561431453105,-5.15123060012869
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N,128,-6.76441088017837,57.3650564300702,-7.2789432153223

E,1,125

E,2,33

E,3,52
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
E,6,81
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E,127,124

d,55, all,0

d,56, all,0

d,57, all,0

d,58, all,0

d,59, all,0

d,60, all,0

d,61, all,0

d,62, all,0

d,63, all,0

d,64, all,0

d,65, all,0

d,66, all,0

d,67, all,0

d,68, all,0

d,69, all,0

d,70, all,0

!（11）合并节点与压缩节点编号
!NUMCMP,node
!NUMCMP,elem
alls,all
ACEL,,,9.8
/SOLU                   !进入求解器
ANTYPE,0               !静力分析
EQSLV,SPAR
PSTRES,ON
solve                  !进行求解
finish                    !完成分析退出求解器
/post1                   !进入后处理
